*Heading
** Job name: beamSinAssembly Model name: Model-1_sinAssembly
** Generated by: Abaqus/CAE 6.14-2
*Preprint, echo=NO, model=NO, history=NO, contact=NO
** ----------------------------------------------------------------
**
** PART INSTANCE: Beam-1
**
*System
       -0.05,          0.,-0.034999999217689,-0.0499999999999999,          0.,-1.03499999921769
       -0.05,          1.,-0.034999999217689
*Node
      1, -0.0399999991, 0.0149999997, 0.00999999978
      2, -0.0399999991, 0.00999999978, 0.00999999978
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*Element, type=C3D20R
 1,  10,  11,  14,  13,   1,   2,   5,   4, 193, 192, 191, 190, 194, 195, 196,
    197, 199, 198, 200, 201
 2,  11,  12,  15,  14,   2,   3,   6,   5, 204, 203, 202, 192, 205, 206, 207,
    195, 198, 208, 209, 200
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*Nset, nset=Beam-1_Set-1, generate
   1,  621,    1
*Elset, elset=Beam-1_Set-1, generate
  1,  80,   1
** Section: Section-1
*Solid Section, elset=Beam-1_Set-1, material=Acero
,
** ----------------------------------------------------------------
**
** PART INSTANCE: Disk-1
**
*System
*Node
    622, 0.0111791072, -0.000166006954,           0.
    623, 0.0101440558, 0.0047008656,           0.
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*Element, type=C3D20R
  81,  2359,  2298,  2287,  3652,   694,   633,   622,  1987,  3955,  3954,  3953,  3952,  3956,  3957,  3958,
       3959,  3961,  3960,  3962,  3963
  82,  3652,  2345,  2959,  3015,  1987,   680,  1294,  1350,  3967,  3966,  3965,  3964,  3968,  3969,  3970,
       3971,  3963,  3972,  3973,  3974
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*Nset, nset=Disk-1_Set-1, generate
   622,  12136,      1
*Elset, elset=Disk-1_Set-1, generate
   81,  1675,     1
** Section: Section-1
*Solid Section, elset=Disk-1_Set-1, material=Acero
,
*System
*Nset, nset=Set-1
 181, 182, 183, 184, 185, 186
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*Elset, elset=Set-1, generate
 77,  80,   1
*Nset, nset=Set-3
  622,  623,  624,  625,  626,  627
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*Elset, elset=Set-3
  81,  83,  84,  99, 119, 120, 130, 151, 179, 188, 189, 191, 192, 606
*Nset, nset=Set-4
  622,  623,  624,  625,  626,  627
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*Elset, elset=Set-4
  81,  83,  84,  99, 119, 120, 130, 151, 179, 188, 189, 191, 192, 606
*Nset, nset=Set-5, generate
   622,  12136,      1
*Elset, elset=Set-5, generate
   81,  1675,     1
*Nset, nset=b_Set-2, generate
   622,  12136,      1
*Elset, elset=b_Set-2, generate
   81,  1675,     1
*Elset, elset=_Surf-1_S1, generate
 77,  80,   1
*Surface, type=ELEMENT, name=Surf-1
_Surf-1_S1, S1
*Elset, elset=_Surf-6_S1, generate
 77,  80,   1
*Surface, type=ELEMENT, name=Surf-6
_Surf-6_S1, S1
*Elset, elset=_Surf-7_S1, generate
 77,  80,   1
*Surface, type=ELEMENT, name=Surf-7
_Surf-7_S1, S1
*Elset, elset=_m_Surf-2_S1, generate
   81,  1675,     1
*Surface, type=ELEMENT, name=m_Surf-2
_m_Surf-2_S1, S1
*Elset, elset=_m_Surf-4_S1, generate
   81,  1675,     1
*Surface, type=ELEMENT, name=m_Surf-4
_m_Surf-4_S1, S1
*Elset, elset=_s_Surf-2_S2, generate
 1,  4,  1
*Surface, type=ELEMENT, name=s_Surf-2
_s_Surf-2_S2, S2
*Elset, elset=_s_Surf-4_S2, generate
 1,  4,  1
*Surface, type=ELEMENT, name=s_Surf-4
_s_Surf-4_S2, S2
**
** MATERIALS
**
*Material, name=Acero
*Density
7900.,
*Elastic
 2.1e+11, 0.3
**
** INTERACTION PROPERTIES
**
*Surface Interaction, name=_Int-1-Prop
1.,
*Friction
0.,
*Surface Behavior, pressure-overclosure=HARD
*Surface Interaction, name=conMu
1.,
*Friction, slip tolerance=0.005
 0.3,
*Surface Behavior, pressure-overclosure=HARD
*Surface Interaction, name=sinMu
1.,
*Friction
0.,
*Surface Behavior, pressure-overclosure=HARD
**
** BOUNDARY CONDITIONS
**
** Name: beam Type: Displacement/Rotation
*Boundary
Set-1, 1, 1
Set-1, 2, 2
Set-1, 4, 4
Set-1, 5, 5
Set-1, 6, 6
** Name: disk Type: Displacement/Rotation
*Boundary
Set-4, 1, 1
Set-4, 2, 2
Set-4, 3, 3
Set-4, 4, 4
Set-4, 5, 5
Set-4, 6, 6
**
** INTERACTIONS
**
** Interaction: Int-1
*Contact Pair, interaction=_Int-1-Prop, type=SURFACE TO SURFACE
s_Surf-4, m_Surf-4
** ----------------------------------------------------------------
**
** STEP: presion
**
*Step, name=presion, nlgeom=NO
*Static
0.1, 1., 0.1, 0.1
**
** LOADS
**
** Name: Load-1   Type: Pressure
*Dsload
Surf-7, P, 1e+06
**
** OUTPUT REQUESTS
**
*Restart, write, frequency=0
**
** FIELD OUTPUT: F-Output-1
**
*Output, field, variable=PRESELECT
**
** HISTORY OUTPUT: H-Output-1
**
*Output, history, variable=PRESELECT
*End Step
** ----------------------------------------------------------------
**
** STEP: giro
**
*Step, name=giro, nlgeom=NO
*Static
1., 1., 1e-05, 1.
**
** BOUNDARY CONDITIONS
**
** Name: beam Type: Displacement/Rotation
*Boundary, op=NEW
Set-1, 1, 1
Set-1, 2, 2
Set-1, 4, 4
Set-1, 5, 5
Set-1, 6, 6
** Name: disk Type: Displacement/Rotation
*Boundary, op=NEW
Set-4, 1, 1
Set-4, 2, 2
Set-4, 3, 3
Set-4, 4, 4
Set-4, 5, 5
** Name: giro Type: Velocity/Angular velocity
*Motion, rotation, type=VELOCITY
Set-5,0.1,0,0,0,0,0,1
**
** INTERACTIONS
**
** Interaction: Int-1
*Change Friction, interaction=_Int-1-Prop
*Friction, slip tolerance=0.005
 0.3,
** Contact Controls for Interaction: Int-1
*Contact Controls, master=m_Surf-4, slave=s_Surf-4, reset
**
** OUTPUT REQUESTS
**
*Restart, write, frequency=0
**
** FIELD OUTPUT: F-Output-1
**
*Output, field, variable=PRESELECT
**
** HISTORY OUTPUT: H-Output-1
**
*Output, history, variable=PRESELECT
*End Step
** ----------------------------------------------------------------
**
** STEP: modo
**
*Step, name=modo, nlgeom=NO, perturbation
*Frequency, eigensolver=Lanczos, acoustic coupling=on, normalization=displacement
30, 1., , , ,
**
** OUTPUT REQUESTS
**
*Restart, write, frequency=0
**
** FIELD OUTPUT: F-Output-2
**
*Output, field, variable=PRESELECT
*End Step
** ----------------------------------------------------------------
**
** STEP: modoComplejo
**
*Step, name=modoComplejo, nlgeom=NO, perturbation, unsymm=YES
*Complex Frequency, friction damping=YES
30, 1., 1e+18,
**
** OUTPUT REQUESTS
**
**
** FIELD OUTPUT: F-Output-3
**
*Output, field, variable=PRESELECT
*End Step
